# SECCIONES DE PROYETO
# 1. VIGAS
# Longitud
Lv := 6 m
# Altura
Hv := Lv/12 = 0.5 m
# Base
Bv := 0.5*Hv = 0.25 m
# Recubrimiento de Viga a
# rostro de estribo
r´ := 1.5 in
# Estribo (Diametro)
Est := (3/8) in
# Diametro de Acero de
# refuerzo
AsDiametro := (3/4) in
# Recubrimiento al centro
r := r´ + Est + AsDiametro/2 = 5.715 cm
# ESPESOR DE LOSA
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# Modulo de Elasticidad del Concreto
Ec := 218819.79 kgf/cm^2
# Longitudes del
# tramo
L1 := 5.5 m
L2 := 6 m
# Espesor estimado
# de losa
ti := 6*4 m/180 = 0.133333 m
# Longitud del tramo
# de losa
Ls := L1/4 + L2/4 = 2.875 m
# Inercia de losa
Is := 1/12*Ls*ti^3 = 0.000567901 m^4
# Inercia de Viga
