# SECCIONES DE PROYETO
# 1. VIGAS
# Longitud
Lv := 6 m
# Altura
Hv := Lv/12 = 0.5 m
# Base
Bv := 0.5*Hv = 0.25 m
# Recubrimiento de Viga a
# rostro de estribo
r´ := 1.5 in
# Estribo (Diametro)
Est := (3/8) in
# Diametro de Acero de
# refuerzo
AsDiametro := (3/4) in
# Recubrimiento al centro
r := r´ + Est + AsDiametro/2 = 5.715 cm
# ESPESOR DE LOSA
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